# Задание 1
x := 2
n := 5
y := (sqrt(x^3 + n) + cos(|n*x - 1|)^2)/(nthroot(x^5 + sin(x) + n, 4)*cos((x + n)*π/4))
y = 2.52809
# Задание 2
f23(x23) := sin(x23)
f24(x23) := cos(x23)
x1 := 7
y1 := 10
z := -3
p := if(x1 > y1, sin(x1) + 3*|y1| - z^2, (3 + y1)*ln(|x1 + 1|)/sqrt(z^2 + 1))
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p = 8.5485
q := if(x1 > y1 and x1 < 1, cos(x1) + 2*|y1 + 1| - z, (y1*x1 + 3)/sqrt(y1^2 + 5))
q = 7.12407
w := if(x1 < y1 or y1 ≥ 10, x1^2 + 2*(y1*x1 + 1) - z, (x1^-3*y1^2 + 3)*sqrt(z^2 + 7))
w = 194
# Задание 3
x2 := -2, -1.6 .. 2
f(x2) := (x2^2 - n*x2 + sin(x2))*sqrt(|x2 - cos(n*x2)|)
x2 = [-2; -1.6; -1.2; -0.8; -0.4; 0; 0.4; 0.8; 1.2; 1.6; 2]
f(x2) = [14.1048; 11.5301; 9.56509; 1.50067; 0.224988; 0; -1.31047; -3.18616; -1.7767; -5.86657; -8.5776]
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# Задание 4
A := runif(3, -3, 3)
B := runif(3, -3, 3)
C := runif(3, -3, 3)
transpose(A) = [-2.99239, -1.84006, 0.510037]
B1 := -B
transpose(B) = [-0.898151, 1.93703, -1.95523]
B1 = [0.898151; -1.93703; 1.95523]
transpose(C) = [1.26297, -1.17608, -2.45153]
s := A*B
V := B1×C
w1 := (A×B)*C
s = -1.87387
V = [7.04819; 4.67124; 1.39011]
w1 = 28.9773
dA := sqrt(A[0]^2 + A[1]^2 + A[2]^2)
dB := sqrt(B[0]^2 + B[1]^2 + B[2]^2)
dC := sqrt(C[0]^2 + C[1]^2 + C[2]^2)
Array := [dA; dB; dC]
Array = [3.5497; 2.89511; 2.99805]
Max := max(Array)
Max = 3.5497
i := 0, 1 .. 9
j := 0, 1 .. 9
M[i, j] := floor(rnd(20)) - 10
sum(sum(M[i, j], j = 0 .. 9), i = 0 .. 9) = -29
SumPos(A) :=
    s ← 0
    for i ∈ 0 .. 9
        for j ∈ 0 .. 9
            s ← s + A[i, j] if A[i, j] > 0
    return s
SumNeg(A) :=
    s ← 0
    for i ∈ 0 .. 9
        for j ∈ 0 .. 9
            s ← s + A[i, j] if A[i, j] < 0
    return s
SumPos(M) = 212
M = [
    -8, 9, -8, -10, 0, 2, -7, -1, -9, 5;
    0, 7, 9, 0, -1, 7, 5, 9, 2, -5;
    6, -3, 3, -10, -5, 1, 6, -1, 4, -1;
    4, 1, 4, 1, -7, -2, 0, 5, -7, -1;
    3, -8, -8, 3, -2, 9, -7, 6, -7, 6;
    -7, 4, -5, 3, 4, -8, 6, 0, -2, 8;
    0, -1, 6, -1, 9, 4, -7, 6, 0, -10;
    1, 0, 6, 3, 6, -8, -4, -5, -8, 6;
    2, -5, -10, 6, -6, 1, -8, 5, 0, -2;
    3, -2, 1, 2, 0, 3, -7, -7, -1, -9
]
SumNeg(M) = -241
X := M[:, 0]
Y := transpose(M)[:, 9]
Y := transpose(Y)
Y = [3, -2, 1, 2, 0, 3, -7, -7, -1, -9]
# Задание 5
X = [-8; 0; 6; 4; 3; -7; 0; 1; 2; 3]
g(t) := e^(-(|t|/3))*cos(t)
с1 := -3*π
с2 := 3*π
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X*Y = [
    -24, 16, -8, -16, 0, -24, 56, 56, 8, 72;
    0, 0, 0, 0, 0, 0, 0, 0, 0, 0;
    18, -12, 6, 12, 0, 18, -42, -42, -6, -54;
    12, -8, 4, 8, 0, 12, -28, -28, -4, -36;
    9, -6, 3, 6, 0, 9, -21, -21, -3, -27;
    -21, 14, -7, -14, 0, -21, 49, 49, 7, 63;
    0, 0, 0, 0, 0, 0, 0, 0, 0, 0;
    3, -2, 1, 2, 0, 3, -7, -7, -1, -9;
    6, -4, 2, 4, 0, 6, -14, -14, -2, -18;
    9, -6, 3, 6, 0, 9, -21, -21, -3, -27
]
# Задание 6
m1 := -9, -8.75 .. 9
m1 = [
    -9; -8.75; -8.5; -8.25; -8; -7.75; -7.5; -7.25; -7; -6.75
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]
f4(m1) :=
    e^m1*m1^3 if m1 < 0
    e^(-m1)*m1^3 if m1 ≥ 0
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# Задание 7
Δx := π/4
k := 1, 2 .. 16
x6 := -2*π
g1(x5) := sqrt(|x5|)*sin(x5)
x5[k] := x6 + Δx*k
x5 = [0; -5.49779; -4.71239; -3.92699; -3.14159; -2.35619; -1.5708; -0.785398; 0; 0.785398; 1.5708; 2.35619; 3.14159; 3.92699; 4.71239; 5.49779; 6.28319]
g1(x5) = [0; 2.69879; 3.81667; 2.69879; 0; -2.69879; -3.81667; -2.69879; 0; 2.69879; 3.81667; 2.69879; 0; -2.69879; -3.81667; -2.69879; 0]
O := x5
Y := g1(x5)
filename1 := "Matr_X.txt"
filename2 := "Matr_Y.txt"
WRITEPRN(filename1) := O
WRITEPRN(filename2) := Y
XX := READPRN(filename1)
YY := READPRN(filename2)
XX = [0; -5.498; -4.712; -3.927; -3.142; -2.356; -1.571; -0.7854; 0; 0.7854; 1.571; 2.356; 3.142; 3.927; 4.712; 5.498; 6.283]
YY = [0; 2.699; 3.817; 2.699; 0; -2.699; -3.817; -2.699; 0; 2.699; 3.817; 2.699; 0; -2.699; -3.817; -2.699; 0]
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# Задание 8
h := -3 .. 3
q1(h) := e^(-h^2)
q2(h) := d/dh(q1(h))
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# Задание 9
i91 := 0 .. 42  # Задание 10
x911 := -15
x912 := 15
Δx91 := 1
j91 := 0 .. 42
y911 := -15
Δy91 := 1
x10 := -5 .. 5
y912 := 15
f10(x10) := x10^2 + (x10 - 2)*sin(x10) - 5
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root(f10(x10), x10) = [-1.32936; -1.32936; -1.32936; -1.32936; -1.32936; -1.32936; 2.19967; 2.19967; 2.19967; 2.19967; 2.19967]
h9(x91, y91) := sin(sqrt(x91^2 + y91^2))/sqrt(x91^2 + y91^2)
x91[i91] := -15 + (30/43)*i91
y91[j91] := -15 + (30/43)*j91
Z9[i91, j91] := h9(x91[i91], y91[j91])
# [component: inputs Z9]
# Задание 11
# Задание 13
x11 := -4 .. 4
f11(x11) := x11^2 + x11*sin(2*x11) - (x11 - 5)*cos(x11)
[
    n*X1 + (n + 1)*Y1 + (n + 2)*Z1 == 6*n + 8;
    (n - 3)*X1 + (n - 2)*Y1 + n*Z1 == 6*n - 7;
    (n - 1)*X1 + n*Y1 + (n + 1)*Z1 == 6*n + 2
] solve, X1, Y1, Z1 → [1, 2, 3]
root(f11(x11), x11) = [-2.97354; -2.97354; -1.93283; -2.97354; -1.93283; -1.93283; -2.97354; -1.93283; -1.93283]
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Given
n*X1 + (n + 1)*Y1 + (n + 2)*Z1 == 6*n + 8
(n - 3)*X1 + (n - 2)*Y1 + n*Z1 == 6*n - 7
(n - 1)*X1 + n*Y1 + (n + 1)*Z1 == 6*n + 2
Find(X1, Y1, Z1) → [1; 2; 3]
root(f11(x11), x11, -4, -2) = -2.97354
# Задание 14
root(f11(x11), x11, -2, 4) = -1.93283
X2^2/81 + Y2^2/16 - 1 == (X2 - 9)^2 + (Y2 - 2)^2 - 25 solve, X2, Y2 → [9/2, 0; 549/40, 0]
# Задание 12
n12 := 5
p(x12) := x12^3 + (4 - n12)*x12^2 + (3 - 4*n12)*x12 - 3*n12
V12 := p(x12) coeffs → [-15; -17; -1; 1]
# Корни полинома
# Задание 15
R12 := polyroots(V12)
f15(x15) := x15*sin(x15)
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R12 = [-3; -1; 5]
x12 := -4, -4 + 0.01 .. 6
i12 := 0, 1 .. 2
# Первый минимум
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x15 := 4
x15 := Minimize(f15, x15)
f15(x15) = -4.81447
x15 = 4.91318
Максимум
x15 := 8
xMax := Maximize(f15, x15)
xMax = 7.97867
