Xa := -2
Xb := -3
Xc := 0
Xd := 3
Xe := 2
Xf := -2
Xh := 2
Ya := -4
Yb := 0
Yc := 4
Yd := 0
Ye := -4
Yf := 0
Yh := 0
X1 := [Xf; Xa; Xe; Xh; Xb; Xc; Xd; Xb]
y1 := [Yf; Ya; Ye; Yh; Yb; Yc; Yd; Yb]
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X1w := 100
Y1w := 200
xhw := 400
yhw := 500
Zx := transpose([Xa, Xb, Xc, Xd, Xe, Xf, Xh])
Zy := transpose([Ya, Yb, Yc, Yd, Ye, Yf, Yh])
XL := min(Zx) = -3
YH := max(Zy) = 4
XH := max(Zx) = 3
YL := min(Zy) = -4
# Вычисление параметров,необходимых для формирования матрицы пересчета координат из МСК в ОСК
ΔXw := xhw - X1w = 300
ΔX := XH - XL = 6
ΔYw := yhw - Y1w = 300
ΔY := YH - YL = 8
Kx := ΔXw/ΔX = 50
Ky := ΔYw/ΔY = 37.5
# Матрица пересчетов из МСК в ОСК
Tsw := [Kx, 0, X1w - Kx*XL; 0, -Ky, yhw + Ky*YL; 0, 0, 1]
# Вычисление координат вершин в ОСК
[Xaw; Yaw; q] := Tsw*[Xa; Ya; 1] = [150; 500; 1]
[Xbw; Ybw; q] := Tsw*[Xb; Yb; 1] = [100; 350; 1]
[Xcw; Ycw; q] := Tsw*[Xc; Yc; 1] = [250; 200; 1]
[Xdw; Ydw; q] := Tsw*[Xd; Yd; 1] = [400; 350; 1]
[Xew; Yew; q] := Tsw*[Xe; Ye; 1] = [350; 500; 1]
[Xfw; Yfw; q] := Tsw*[Xf; Yf; 1] = [150; 350; 1]
[XHW; YHW; q] := Tsw*[Xh; Yh; 1] = [350; 350; 1]
Z2x := [Xfw; Xaw; Xew; XHW; Xbw; Xcw; Xdw; Xbw]
Z2y := -[Yfw; Yaw; Yew; YHW; Ybw; Ycw; Ydw; Ybw]
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f(x) := sqrt(|x|)*sin(π*x)
x1 := -6
x2 := 6
Δx := 0.1
X1w = 100
Y1w = 200
Xhw := 800
Yhw := 900
N := ((x2 - x1)/Δx) = 120
i := 0, 1 .. 120
X[i] := x1 + i*Δx
Y[i] := f(X[i])
Z[i] := 1
Y1 := min(Y) = -2.34521
X1 := -6
Yh := max(Y) = 2.34521
Xh := 6
ΔXw := 700
ΔX := 12
ΔYw := 700
ΔY := 4.69
ky := ΔYw/ΔY = 149.254
kx := ΔXw/ΔX = 58.3333
Tsw := [ky, 0, X1w - kx*X1; 0, ky, Yhw + ky*Y1; 0, 0, 1] = [149.254, 0, 450; 0, 149.254, 549.969; 0, 0, 1]
M := stack(transpose(X), transpose(Y), transpose(Z))
Mw := Tsw*M = [
    -445.522, -430.597, -415.672, -400.746, -385.821, -370.896, -355.97, -341.045, -326.119, -311.194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;
    549.969, 661.999, 761.249, 838.253, 885.881, 900, 879.828, 827.954, 750.022, 654.127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;
    1, 1, 1, 1, 1, 1, 1, 1, 1, 1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]
Xw := transpose(Mw)[:, 0] = [
    -445.522; -430.597; -415.672; -400.746; -385.821; -370.896; -355.97; -341.045; -326.119; -311.194
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]
Yw := transpose(Mw)[:, 1] = [
    549.969; 661.999; 761.249; 838.253; 885.881; 900; 879.828; 827.954; 750.022; 654.127
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]
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