В мировой системе координат (МСК)   задана трапеция (фигура) ABCD, AB||CD
X_AB := [4; 4]
Y_AB := [2; 8]
X_CD := [6; 6]
Y_CD := [7; 3]
X_BC := [4; 6]
Y_BC := [8; 7]
X_AD := [4; 6]
Y_AD := [2; 3]
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# 1. Найдем уравнения прямых, включающих отрезки BC, DA
B(4, 8)
C(6, 7)
A(4, 2)
D(6, 3)
x := [4; 6]
y := [8; 7]
x2 := [4; 6]
y2 := [2; 3]
a := slope(x, y) = -0.5
a2 := slope(x2, y2) = 0.5
b2 := intercept(x2, y2) = 0
b := intercept(x, y) = 10
f1(x) := a*x + b
f2(x) := a2*x + b2
x := 3 .. 11
X_AD := [4; 6]
X_DC := [6; 6]
Y_AD := [2; 3]
Y_DC := [3; 7]
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# 2. Найдем точку P пересечения прямых BC и AD
xx := 1
f(xx) := f1(xx) - f2(xx)
x0 := root(f(xx), xx) = 10
y0 := f1(x0) = 5
# (4, 5) - координаты точки P в МСК
# 3. Найдем новые координаты точек
P := [4, 6, 4, 6; 2, 3, 8, 7; 1, 1, 1, 1]  # - матрица координат
ϕ := 270
ϕ_rad := ϕ*π/180
Rs(ϕ) := [cos(ϕ), -sin(ϕ), 0; sin(ϕ), cos(ϕ), 0; 0, 0, 1]  # - поворот системы координат на угол
ϕ := 180
ϕ := 180
ϕ := 180
Ts(dx, dy) := [1, 0, -dx; 0, 1, -dy; 0, 0, 1]  # - матрица для смещения начала СК:
A1 := Ts(x0, y0)*P = [-6, -4, -6, -4; -3, -2, 3, 2; 1, 1, 1, 1]  # - смещаем систему координат в точку Р
A2 := Rs(ϕ_rad)*A1 = [-3, -2, 3, 2; 6, 4, 6, 4; 1, 1, 1, 1]  # - поворачиваем систему координат на угол ϕ
A3 := Ts(-x0, -y0)*A2 = [7, 8, 13, 12; 11, 9, 11, 9; 1, 1, 1, 1]  # - снова смещаем СК в исходное положение
X_AD_New := [7; 8]
Y_AD_New := [11; 9]
X_BC_New := [13; 12]
Y_BC_New := [11; 9]
X_CD_New := [13; 7]
Y_CD_New := [11; 11]
X_BA_New := [12; 8]
Y_BA_New := [9; 9]
A(7, 11)*и*D(8, 9)
x3 := [7; 8]
y3 := [11; 9]
a3 := slope(x3, y3) = -2
b3 := intercept(x3, y3) = 25
f1(x3) := a3*x3 + b3
B(13, 12)*и*C(11, 9)
x4 := [13; 12]
y4 := [11; 9]
a4 := slope(x4, y4) = 2
b4 := intercept(x4, y4) = -15
f2(x4) := a4*x4 + b4
# Верхняя строка - абсциссы вершин отрезка, нижняя - ординаты
x1 := 7 .. 10
x2 := 10 .. 13
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